<?xml version="1.0"?>
<!-- Generated by Aero-Matic v 0.8

     Inputs:
                horsepower: 1000.0
                     pitch: variable
            max engine rpm: 2200
        prop diameter (ft): 11.8116

     Outputs:
              max prop rpm:1588.52
                gear ratio:   1.38
                       Cp0:0.054210
                       Ct0:0.046621
       static thrust (lbs):1512.55
-->

<propeller name="prop">
 <ixx>19.1915 </ixx>

  <diameter unit="IN">101.0 </diameter>
  <numblades> 4 </numblades>
  <minpitch> 17 </minpitch>
  <maxpitch> 32 </maxpitch>
  <minrpm>   400 </minrpm>
  <maxrpm>   2500 </maxrpm>

  <table name="C_THRUST" type="internal">
      <tableData>
                17         32
       0.0      0.0466   0.0866
       0.1      0.0428   0.0866
       0.2      0.0388   0.0866
       0.3      0.0323   0.0862
       0.4      0.0245   0.0858
       0.5      0.0167   0.0846
       0.6      0.0072   0.0801
       0.7      -0.0006   0.0721
       0.8      -0.0138   0.0639
       1.0      -0.0299   0.0425
       1.2      -0.0490   0.0227
       1.4      -0.0669   0.0016
       1.6      -0.0876   -0.0186
       1.8      -0.1072   -0.0388
       2.0      -0.1259   -0.0599
       2.2      -0.1445   -0.0814
       2.4      -0.1632   -0.1031
      </tableData>
  </table>

  <table name="C_POWER" type="internal">
     <tableData>
                17         32
       0.0      0.0542   0.1142
       0.1      0.0542   0.1142
       0.2      0.0517   0.1142
       0.3      0.0491   0.1142
       0.4      0.0432   0.1142
       0.5      0.0356   0.1130
       0.6      0.0288   0.1117
       0.7      0.0170   0.1092
       0.8      0.0068   0.1040
       1.0      -0.0203   0.0850
       1.2      -0.0593   0.0571
       1.4      -0.1100   0.0286
       1.6      -0.1626   -0.0025
       1.8      -0.2168   -0.0697
       2.0      -0.2711   -0.1393
       2.2      -0.3253   -0.2090
       2.4      -0.3795   -0.2787
     </tableData>
  </table>

</propeller>
